# Worksheet setting: ORIGIN = 1
# Початкові значення
variant := 9
function(x) := cos(x)/(x + 1)
a := 0.1
b := 1.1
# [plot: function(x) vs x]
# Метод Сімпсона
integral(function(x), x = 0.1 .. 1.1) = 0.530173
